# STRASSEN SIMD
amdahl(n, p) := 1/((1 - p) + p/n)
vn := [1; 2; 3; 4]
vy := [12.34/12.34; 12.34/6.60; 12.34/4.87; 12.34/4.06]
12.34 S = 12.34 1/Ω
amdahl_n(n, p) := d/dn(amdahl(n, p))
amdahl_p(n, p) := d/dp(amdahl(n, p))
F(n, p) := [amdahl(n, p); amdahl_p(n, p)]
amdahl(1000, .99) = 90.9918
p_0 := genfit(vn, vy, [.95], F) = 0.899435
amdahl(100, p_0) = 9.12745
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# REKURSIV SIMD
amdahl(n, p) := 1/((1 - p) + p/n)
vn := [1; 2; 3; 4]
vy := [43.38/43.38; 43.38/21.79; 43.38/15.46; 43.38/11.7]
amdahl_n(n, p) := d/dn(amdahl(n, p))
amdahl_p(n, p) := d/dp(amdahl(n, p))
F(n, p) := [amdahl(n, p); amdahl_p(n, p)]
amdahl(1000, .99) = 90.9918
p_0 := genfit(vn, vy, [.8], F)
amdahl(100, p_0) = 26.9131
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# ITERATIV SIMD
amdahl(n, p) := 1/((1 - p) + p/n)
vn := [1; 2; 3; 4]
vy := [45.50/45.50; 45.50/22.97; 45.50/15.98; 45.50/12.21]
amdahl_n(n, p) := d/dn(amdahl(n, p))
amdahl_p(n, p) := d/dp(amdahl(n, p))
F(n, p) := [amdahl(n, p); amdahl_p(n, p)]
amdahl(1000, .99) = 90.9918
p_0 := genfit(vn, vy, [.8], F)
amdahl(100, p_0) = 29.1307
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