(d - 1 + B - 2)/B simplify → (d - 3)/B + 1
B := 16
M := 2^16 = 65536
d := 33
n := 2^24
m := floor((d - 1 - 2)/B) + 2 = 3
foo(j) := sum({
    1 if mod((d - 1)*x, B) == j
    0 otherwise
}, x = 0 .. B - 1)
p_s(j) := foo(j)/sum(foo(y), y = 0 .. B - 1)  # Tjek 1
p_s(j) := foo(j)/B
sum(foo(y), y = 0 .. B - 1) = 16
sum(p_s(j), j = 0 .. B - 1) = 1
p_xs(i, j) :=
    min(B - j, d - 1)/(d - 1) if i == 1
    1 - sum(p_xs(i, j), i = 1 .. m - 1) if i == m and i ≠ 1
    B/(d - 1) otherwise
# Tjek 1
p_x(i) := sum(p_xs(i, j)*p_s(j), j = 0 .. B - 1)
sum(p_x(i), i = 1 .. m) = 1
# Boer vaere mere end 1 med mindre d=2!
expected := sum(i*p_x(i), i = 1 .. m) = 1.5
log(n, d)*expected - log(M/(d - 1), d) = 4.956
log(n, d)*expected = 7.13664
log(n, d) = 4.75776
